<?xml version="1.0"?>

<piston_engine name="overboosted motorbike engine">
	<minmp unit="INHG">		    3.0  </minmp>
	<maxmp unit="INHG">		   28.0  </maxmp>
	<displacement unit="CC">  21600.0</displacement>
	<stroke unit="IN">			3.875</stroke>
	<cylinders>					12.0  </cylinders>
	<compression-ratio>			13  </compression-ratio>
	<maxhp> 				  102.0  </maxhp>
	<cycles>				  4.0  </cycles>
	<idlerpm>				  203.0  </idlerpm>
	<maxrpm>				 1300.0  </maxrpm>
	<sparkfaildrop>				0.0  </sparkfaildrop>
	<volumetric-efficiency>		1.03 </volumetric-efficiency>
	<air-intake-impedance-factor>0.21</air-intake-impedance-factor>
	<numboostspeeds>1</numboostspeeds>
	<boost-loss-factor>1</boost-loss-factor> <!-- It's a turbo, not a goddamned super. This should probably be lower(!)-->
	<ratedboost1>         3 </ratedboost1>
	<ratedpower1>        55 </ratedpower1>
	<ratedrpm1>       15000 </ratedrpm1>
	<ratedaltitude1>  11000 </ratedaltitude1>
	<man-press-lag>     1.5 </man-press-lag> <!-- to simulate turbo lag -->
	<boostmanual>         0 </boostmanual>
	<!-- Optional items that affect engine performance -->
	<!-- Defining <bsfc> over-rides the built-in horsepower calculations -->
	<!-- <bsfc>						0.326</bsfc> -->
</piston_engine>
