<?xml version="1.0"?>

<piston_engine name="Because Why Not">
	<minmp unit="INHG">	    12.0  </minmp>
	<maxmp unit="INHG">	    23.4  </maxmp>
	<displacement unit="IN3">  380.0  </displacement>
	<stroke unit="IN">           4.0  </stroke>
	<cylinders>		     8.0  </cylinders>
	<compression-ratio>	    13.0  </compression-ratio> <!-- actually a 13:1 EXPANSION -->
	<maxhp> 		   420.0  </maxhp>
	<cycles>		     4.0  </cycles>
	<idlerpm>		   200.0  </idlerpm>
	<maxrpm>		  2400.0  </maxrpm>
	<sparkfaildrop>		     0.1  </sparkfaildrop> <!-- single spark motor -->
	<volumetric-efficiency>	     1.005 </volumetric-efficiency>
	<air-intake-impedance-factor>0.2</air-intake-impedance-factor>
	<numboostspeeds>               1</numboostspeeds>
	<boost-loss-factor>          0.1</boost-loss-factor>
	<ratedboost1>         6 </ratedboost1>
	<ratedpower1>       480 </ratedpower1>
	<ratedrpm1>        4000 </ratedrpm1>
	<ratedaltitude1>  14000 </ratedaltitude1>
	<man-press-lag>     0.9 </man-press-lag>
	<boostmanual>         0 </boostmanual>
	<!-- Optional items that affect engine performance -->
	<!-- Defining <bsfc> over-rides the built-in horsepower calculations -->
	<!--bsfc>						0.35</bsfc-->
</piston_engine>
